// SBML level 3 version 2

model combined_model_of__combined_model_of__reservoir_model_combined_model_of__combined_model_of__combined_model_of__bioscrape_generated_model_988263_bioscrape_generated_model_56098()
  // model units - substance: mole, time: second, volume: litre, area: square_metre, length: metre, extent: mole

  // Compartments:
  compartment cell_1_external = 1e-6 litre;
  compartment cell_1_internal = 0;

  // Species:
  species IPTG_reservoir_model in cell_1_external = 10000;
  species G_bioscrape_generated_model_988263_combined_model_of__bioscrape_generated_model_988263_bioscrape_generated_model_56098 in cell_1_internal = 1;
  species S_bioscrape_generated_model_988263_combined_model_of__bioscrape_generated_model_988263_bioscrape_generated_model_56098 in cell_1_internal = 10000/cell_1_internal; S_bioscrape_generated_model_988263_combined_model_of__bioscrape_generated_model_988263_bioscrape_generated_model_56098 is "IPTG";
  species mRNA_T_bioscrape_generated_model_988263_1_combined_combined_model_of__bioscrape_generated_model_988263_bioscrape_generated_model_56098 in cell_1_internal = 0;
  species X_bioscrape_generated_model_56098_combined_model_of__bioscrape_generated_model_988263_bioscrape_generated_model_56098 in cell_1_internal = 0;

  // Parameters:
  KI_bioscrape_generated_model_988263_combined_model_of__bioscrape_generated_model_988263_bioscrape_generated_model_56098 = 10;
  KX_bioscrape_generated_model_988263_combined_model_of__bioscrape_generated_model_988263_bioscrape_generated_model_56098 = 2;
  DummyVar_PositiveHillPropensity_n_0_bioscrape_generated_model_56098_combined_model_of__bioscrape_generated_model_988263_bioscrape_generated_model_56098 = 1;
  KR_bioscrape_generated_model_56098_combined_model_of__bioscrape_generated_model_988263_bioscrape_generated_model_56098 = 20;
  KTR_bioscrape_generated_model_56098_combined_model_of__bioscrape_generated_model_988263_bioscrape_generated_model_56098 = 5;
  delta_combined_combined_model_of__bioscrape_generated_model_988263_bioscrape_generated_model_56098 = 0.1;
  n_combined_combined_model_of__bioscrape_generated_model_988263_bioscrape_generated_model_56098 = 2;

  // Reactions:
  r0_bioscrape_generated_model_988263_combined_model_of__bioscrape_generated_model_988263_bioscrape_generated_model_56098: G_bioscrape_generated_model_988263_combined_model_of__bioscrape_generated_model_988263_bioscrape_generated_model_56098 => G_bioscrape_generated_model_988263_combined_model_of__bioscrape_generated_model_988263_bioscrape_generated_model_56098 + mRNA_T_bioscrape_generated_model_988263_1_combined_combined_model_of__bioscrape_generated_model_988263_bioscrape_generated_model_56098; G_bioscrape_generated_model_988263_combined_model_of__bioscrape_generated_model_988263_bioscrape_generated_model_56098*KX_bioscrape_generated_model_988263_combined_model_of__bioscrape_generated_model_988263_bioscrape_generated_model_56098*S_bioscrape_generated_model_988263_combined_model_of__bioscrape_generated_model_988263_bioscrape_generated_model_56098^n_combined_combined_model_of__bioscrape_generated_model_988263_bioscrape_generated_model_56098/(KI_bioscrape_generated_model_988263_combined_model_of__bioscrape_generated_model_988263_bioscrape_generated_model_56098 + S_bioscrape_generated_model_988263_combined_model_of__bioscrape_generated_model_988263_bioscrape_generated_model_56098^n_combined_combined_model_of__bioscrape_generated_model_988263_bioscrape_generated_model_56098);  // modifiers: S_bioscrape_generated_model_988263_combined_model_of__bioscrape_generated_model_988263_bioscrape_generated_model_56098
  r1_bioscrape_generated_model_988263_combined_model_of__bioscrape_generated_model_988263_bioscrape_generated_model_56098: mRNA_T_bioscrape_generated_model_988263_1_combined_combined_model_of__bioscrape_generated_model_988263_bioscrape_generated_model_56098 => ; delta_combined_combined_model_of__bioscrape_generated_model_988263_bioscrape_generated_model_56098*mRNA_T_bioscrape_generated_model_988263_1_combined_combined_model_of__bioscrape_generated_model_988263_bioscrape_generated_model_56098;
  r0_bioscrape_generated_model_56098_combined_model_of__bioscrape_generated_model_988263_bioscrape_generated_model_56098: mRNA_T_bioscrape_generated_model_988263_1_combined_combined_model_of__bioscrape_generated_model_988263_bioscrape_generated_model_56098 => mRNA_T_bioscrape_generated_model_988263_1_combined_combined_model_of__bioscrape_generated_model_988263_bioscrape_generated_model_56098 + X_bioscrape_generated_model_56098_combined_model_of__bioscrape_generated_model_988263_bioscrape_generated_model_56098; KTR_bioscrape_generated_model_56098_combined_model_of__bioscrape_generated_model_988263_bioscrape_generated_model_56098*mRNA_T_bioscrape_generated_model_988263_1_combined_combined_model_of__bioscrape_generated_model_988263_bioscrape_generated_model_56098^n_combined_combined_model_of__bioscrape_generated_model_988263_bioscrape_generated_model_56098/(KR_bioscrape_generated_model_56098_combined_model_of__bioscrape_generated_model_988263_bioscrape_generated_model_56098 + mRNA_T_bioscrape_generated_model_988263_1_combined_combined_model_of__bioscrape_generated_model_988263_bioscrape_generated_model_56098^DummyVar_PositiveHillPropensity_n_0_bioscrape_generated_model_56098_combined_model_of__bioscrape_generated_model_988263_bioscrape_generated_model_56098);
  r1_bioscrape_generated_model_56098_combined_model_of__bioscrape_generated_model_988263_bioscrape_generated_model_56098: X_bioscrape_generated_model_56098_combined_model_of__bioscrape_generated_model_988263_bioscrape_generated_model_56098 => ; X_bioscrape_generated_model_56098_combined_model_of__bioscrape_generated_model_988263_bioscrape_generated_model_56098*delta_combined_combined_model_of__bioscrape_generated_model_988263_bioscrape_generated_model_56098;

  // Unit definitions:
  unit square_metre = metre^2;
  unit per_second = 1 / second;
  unit substance = dimensionless;
end
