// SBML level 3 version 2

model combined_model_of__bioscrape_generated_model_988263_bioscrape_generated_model_56098()
  // model units - substance: mole, time: second, volume: litre, area: square_metre, length: metre, extent: mole

  // Compartments:
  compartment default_bioscrape_generated_model_988263_combined = 2e-6;

  // Species:
  species G_bioscrape_generated_model_988263 in default_bioscrape_generated_model_988263_combined = 1;
  species S_bioscrape_generated_model_988263 in default_bioscrape_generated_model_988263_combined = 0;
  species mRNA_T_bioscrape_generated_model_988263_1_combined in default_bioscrape_generated_model_988263_combined = 0;
  species X_bioscrape_generated_model_56098 in default_bioscrape_generated_model_988263_combined = 0;

  // Parameters:
  KI_bioscrape_generated_model_988263 = 10;
  KX_bioscrape_generated_model_988263 = 2;
  DummyVar_PositiveHillPropensity_n_0_bioscrape_generated_model_56098 = 1;
  KR_bioscrape_generated_model_56098 = 20;
  KTR_bioscrape_generated_model_56098 = 5;
  delta_combined = 0.1;
  n_combined = 2;

  // Reactions:
  r0_bioscrape_generated_model_988263: G_bioscrape_generated_model_988263 => G_bioscrape_generated_model_988263 + mRNA_T_bioscrape_generated_model_988263_1_combined; G_bioscrape_generated_model_988263*KX_bioscrape_generated_model_988263*S_bioscrape_generated_model_988263^n_combined/(KI_bioscrape_generated_model_988263 + S_bioscrape_generated_model_988263^n_combined);  // modifiers: S_bioscrape_generated_model_988263
  r1_bioscrape_generated_model_988263: mRNA_T_bioscrape_generated_model_988263_1_combined => ; delta_combined*mRNA_T_bioscrape_generated_model_988263_1_combined;
  r0_bioscrape_generated_model_56098: mRNA_T_bioscrape_generated_model_988263_1_combined => mRNA_T_bioscrape_generated_model_988263_1_combined + X_bioscrape_generated_model_56098; KTR_bioscrape_generated_model_56098*mRNA_T_bioscrape_generated_model_988263_1_combined^n_combined/(KR_bioscrape_generated_model_56098 + mRNA_T_bioscrape_generated_model_988263_1_combined^DummyVar_PositiveHillPropensity_n_0_bioscrape_generated_model_56098);
  r1_bioscrape_generated_model_56098: X_bioscrape_generated_model_56098 => ; X_bioscrape_generated_model_56098*delta_combined;

  // Unit definitions:
  unit square_metre = metre^2;
end
